OpenVSP model (file version 5), 19 components.
Geometry view with OpenVSP parameter names; values to 6 digits, angles in degrees, lengths in the model's unit.
Overall bounding box: X_Min=-0.0001 X_Len=1.8501 Y_Min=-2.50943 Y_Len=5.01885 Z_Min=-0.462507 Z_Len=1.21106

Wing "main_wing"
  location (X Y Z) 0 0 0, rotation 0 0 0
  symmetric about XZ
  bounding box size 0.400031 5.01885 0.76068
  totals: TotalSpan=5.47214 TotalProjectedSpan=5 TotalChord=0.35 TotalArea=1.94164 TotalAR=12.8757 MAC=0.366047
  root: chord 0.4, twist 0, airfoil file "CLARK Y AIRFOIL"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 BaseThickChord=0.117017 ThickChord=0.117073
  sections:
    n  Span     Root_Chord  Tip_Chord  Area     Sweep  Sweep_Location  Dihedral  Twist  Twist_Location  tip airfoil
    1  1.5      0.4         0.4        0.6      0      0.25            0         0      0               as above
    2  1.23607  0.4         0.2        0.37082  0      0.25            36        0      0               as above

Wing "horizontal_stabilizer"
  location (X Y Z) 1.6 0 -0.45, rotation 0 0 0
  symmetric about XZ
  bounding box size 0.25 1.22501 0.0250145
  totals: TotalSpan=1.2 TotalProjectedSpan=1.2 TotalChord=0.25 TotalArea=0.3 TotalAR=4.8 MAC=0.25
  root: chord 0.25, twist 0, NACA 4-series Camber=0 CamberLoc=0.2 ThickChord=0.1
  sections:
    n  Span  Root_Chord  Tip_Chord  Area  Sweep  Sweep_Location  Dihedral  Twist  Twist_Location  tip airfoil
    1  0.6   0.25        0.25       0.15  0      0.25            0         0      0               as above

Wing "vertical_stabilizer"
  location (X Y Z) 1.6 0 -0.45, rotation 90 0 0
  bounding box size 0.25 0.0250145 0.512507
  totals: TotalSpan=0.5 TotalProjectedSpan=0.5 TotalChord=0.25 TotalArea=0.125 TotalAR=2 MAC=0.25
  root: chord 0.25, twist 0, NACA 4-series Camber=0 CamberLoc=0.2 ThickChord=0.1
  sections:
    n  Span  Root_Chord  Tip_Chord  Area   Sweep  Sweep_Location  Dihedral  Twist  Twist_Location  tip airfoil
    1  0.5   0.25        0.25       0.125  0      0.25            0         0      0               as above

Wing "ehd_wire_c1_r1"
  location (X Y Z) -0.0001 0 -0.15, rotation 0 0 0
  symmetric about XZ
  bounding box size 0.0002 3 0.0002
  totals: TotalSpan=3 TotalProjectedSpan=3 TotalChord=0.0002 TotalArea=0.0006 TotalAR=15000 MAC=0.0002
  root: chord 0.0002, twist 0, circle Circle_Diameter=0.0002
  sections:
    n  Span  Root_Chord  Tip_Chord  Area    Sweep  Sweep_Location  Dihedral  Twist  Twist_Location  tip airfoil
    1  1.5   0.0002      0.0002     0.0003  0      0               0         0      0.25            as above

Wing "ehd_collector_c1_r1"
  location (X Y Z) 0.06 0 -0.15, rotation 0 0 0
  symmetric about XZ
  bounding box size 0.05 3 0.0050029
  totals: TotalSpan=3 TotalProjectedSpan=3 TotalChord=0.05 TotalArea=0.15 TotalAR=60 MAC=0.05
  root: chord 0.05, twist 0, NACA 4-series Camber=0 CamberLoc=0.2 ThickChord=0.1
  sections:
    n  Span  Root_Chord  Tip_Chord  Area   Sweep  Sweep_Location  Dihedral  Twist  Twist_Location  tip airfoil
    1  1.5   0.05        0.05       0.075  0      0               0         0      0.25            as above

Wing "ehd_wire_c1_r2"
  location (X Y Z) -0.0001 0 -0.25, rotation 0 0 0
  symmetric about XZ
  bounding box size 0.0002 3 0.0002
  totals: TotalSpan=3 TotalProjectedSpan=3 TotalChord=0.0002 TotalArea=0.0006 TotalAR=15000 MAC=0.0002
  root: chord 0.0002, twist 0, circle Circle_Diameter=0.0002
  sections:
    n  Span  Root_Chord  Tip_Chord  Area    Sweep  Sweep_Location  Dihedral  Twist  Twist_Location  tip airfoil
    1  1.5   0.0002      0.0002     0.0003  0      0               0         0      0.25            as above

Wing "ehd_collector_c1_r2"
  location (X Y Z) 0.06 0 -0.25, rotation 0 0 0
  symmetric about XZ
  bounding box size 0.05 3 0.0050029
  totals: TotalSpan=3 TotalProjectedSpan=3 TotalChord=0.05 TotalArea=0.15 TotalAR=60 MAC=0.05
  root: chord 0.05, twist 0, NACA 4-series Camber=0 CamberLoc=0.2 ThickChord=0.1
  sections:
    n  Span  Root_Chord  Tip_Chord  Area   Sweep  Sweep_Location  Dihedral  Twist  Twist_Location  tip airfoil
    1  1.5   0.05        0.05       0.075  0      0               0         0      0.25            as above

Wing "ehd_wire_c1_r3"
  location (X Y Z) -0.0001 0 -0.35, rotation 0 0 0
  symmetric about XZ
  bounding box size 0.0002 3 0.0002
  totals: TotalSpan=3 TotalProjectedSpan=3 TotalChord=0.0002 TotalArea=0.0006 TotalAR=15000 MAC=0.0002
  root: chord 0.0002, twist 0, circle Circle_Diameter=0.0002
  sections:
    n  Span  Root_Chord  Tip_Chord  Area    Sweep  Sweep_Location  Dihedral  Twist  Twist_Location  tip airfoil
    1  1.5   0.0002      0.0002     0.0003  0      0               0         0      0.25            as above

Wing "ehd_collector_c1_r3"
  location (X Y Z) 0.06 0 -0.35, rotation 0 0 0
  symmetric about XZ
  bounding box size 0.05 3 0.0050029
  totals: TotalSpan=3 TotalProjectedSpan=3 TotalChord=0.05 TotalArea=0.15 TotalAR=60 MAC=0.05
  root: chord 0.05, twist 0, NACA 4-series Camber=0 CamberLoc=0.2 ThickChord=0.1
  sections:
    n  Span  Root_Chord  Tip_Chord  Area   Sweep  Sweep_Location  Dihedral  Twist  Twist_Location  tip airfoil
    1  1.5   0.05        0.05       0.075  0      0               0         0      0.25            as above

Wing "ehd_wire_c1_r4"
  location (X Y Z) -0.0001 0 -0.45, rotation 0 0 0
  symmetric about XZ
  bounding box size 0.0002 3 0.0002
  totals: TotalSpan=3 TotalProjectedSpan=3 TotalChord=0.0002 TotalArea=0.0006 TotalAR=15000 MAC=0.0002
  root: chord 0.0002, twist 0, circle Circle_Diameter=0.0002
  sections:
    n  Span  Root_Chord  Tip_Chord  Area    Sweep  Sweep_Location  Dihedral  Twist  Twist_Location  tip airfoil
    1  1.5   0.0002      0.0002     0.0003  0      0               0         0      0.25            as above

Wing "ehd_collector_c1_r4"
  location (X Y Z) 0.06 0 -0.45, rotation 0 0 0
  symmetric about XZ
  bounding box size 0.05 3 0.0050029
  totals: TotalSpan=3 TotalProjectedSpan=3 TotalChord=0.05 TotalArea=0.15 TotalAR=60 MAC=0.05
  root: chord 0.05, twist 0, NACA 4-series Camber=0 CamberLoc=0.2 ThickChord=0.1
  sections:
    n  Span  Root_Chord  Tip_Chord  Area   Sweep  Sweep_Location  Dihedral  Twist  Twist_Location  tip airfoil
    1  1.5   0.05        0.05       0.075  0      0               0         0      0.25            as above

Wing "ehd_wire_c2_r1"
  location (X Y Z) 0.2999 0 -0.15, rotation 0 0 0
  symmetric about XZ
  bounding box size 0.0002 3 0.0002
  totals: TotalSpan=3 TotalProjectedSpan=3 TotalChord=0.0002 TotalArea=0.0006 TotalAR=15000 MAC=0.0002
  root: chord 0.0002, twist 0, circle Circle_Diameter=0.0002
  sections:
    n  Span  Root_Chord  Tip_Chord  Area    Sweep  Sweep_Location  Dihedral  Twist  Twist_Location  tip airfoil
    1  1.5   0.0002      0.0002     0.0003  0      0               0         0      0.25            as above

Wing "ehd_collector_c2_r1"
  location (X Y Z) 0.36 0 -0.15, rotation 0 0 0
  symmetric about XZ
  bounding box size 0.05 3 0.0050029
  totals: TotalSpan=3 TotalProjectedSpan=3 TotalChord=0.05 TotalArea=0.15 TotalAR=60 MAC=0.05
  root: chord 0.05, twist 0, NACA 4-series Camber=0 CamberLoc=0.2 ThickChord=0.1
  sections:
    n  Span  Root_Chord  Tip_Chord  Area   Sweep  Sweep_Location  Dihedral  Twist  Twist_Location  tip airfoil
    1  1.5   0.05        0.05       0.075  0      0               0         0      0.25            as above

Wing "ehd_wire_c2_r2"
  location (X Y Z) 0.2999 0 -0.25, rotation 0 0 0
  symmetric about XZ
  bounding box size 0.0002 3 0.0002
  totals: TotalSpan=3 TotalProjectedSpan=3 TotalChord=0.0002 TotalArea=0.0006 TotalAR=15000 MAC=0.0002
  root: chord 0.0002, twist 0, circle Circle_Diameter=0.0002
  sections:
    n  Span  Root_Chord  Tip_Chord  Area    Sweep  Sweep_Location  Dihedral  Twist  Twist_Location  tip airfoil
    1  1.5   0.0002      0.0002     0.0003  0      0               0         0      0.25            as above

Wing "ehd_collector_c2_r2"
  location (X Y Z) 0.36 0 -0.25, rotation 0 0 0
  symmetric about XZ
  bounding box size 0.05 3 0.0050029
  totals: TotalSpan=3 TotalProjectedSpan=3 TotalChord=0.05 TotalArea=0.15 TotalAR=60 MAC=0.05
  root: chord 0.05, twist 0, NACA 4-series Camber=0 CamberLoc=0.2 ThickChord=0.1
  sections:
    n  Span  Root_Chord  Tip_Chord  Area   Sweep  Sweep_Location  Dihedral  Twist  Twist_Location  tip airfoil
    1  1.5   0.05        0.05       0.075  0      0               0         0      0.25            as above

Wing "ehd_wire_c2_r3"
  location (X Y Z) 0.2999 0 -0.35, rotation 0 0 0
  symmetric about XZ
  bounding box size 0.0002 3 0.0002
  totals: TotalSpan=3 TotalProjectedSpan=3 TotalChord=0.0002 TotalArea=0.0006 TotalAR=15000 MAC=0.0002
  root: chord 0.0002, twist 0, circle Circle_Diameter=0.0002
  sections:
    n  Span  Root_Chord  Tip_Chord  Area    Sweep  Sweep_Location  Dihedral  Twist  Twist_Location  tip airfoil
    1  1.5   0.0002      0.0002     0.0003  0      0               0         0      0.25            as above

Wing "ehd_collector_c2_r3"
  location (X Y Z) 0.36 0 -0.35, rotation 0 0 0
  symmetric about XZ
  bounding box size 0.05 3 0.0050029
  totals: TotalSpan=3 TotalProjectedSpan=3 TotalChord=0.05 TotalArea=0.15 TotalAR=60 MAC=0.05
  root: chord 0.05, twist 0, NACA 4-series Camber=0 CamberLoc=0.2 ThickChord=0.1
  sections:
    n  Span  Root_Chord  Tip_Chord  Area   Sweep  Sweep_Location  Dihedral  Twist  Twist_Location  tip airfoil
    1  1.5   0.05        0.05       0.075  0      0               0         0      0.25            as above

Wing "ehd_wire_c2_r4"
  location (X Y Z) 0.2999 0 -0.45, rotation 0 0 0
  symmetric about XZ
  bounding box size 0.0002 3 0.0002
  totals: TotalSpan=3 TotalProjectedSpan=3 TotalChord=0.0002 TotalArea=0.0006 TotalAR=15000 MAC=0.0002
  root: chord 0.0002, twist 0, circle Circle_Diameter=0.0002
  sections:
    n  Span  Root_Chord  Tip_Chord  Area    Sweep  Sweep_Location  Dihedral  Twist  Twist_Location  tip airfoil
    1  1.5   0.0002      0.0002     0.0003  0      0               0         0      0.25            as above

Wing "ehd_collector_c2_r4"
  location (X Y Z) 0.36 0 -0.45, rotation 0 0 0
  symmetric about XZ
  bounding box size 0.05 3 0.0050029
  totals: TotalSpan=3 TotalProjectedSpan=3 TotalChord=0.05 TotalArea=0.15 TotalAR=60 MAC=0.05
  root: chord 0.05, twist 0, NACA 4-series Camber=0 CamberLoc=0.2 ThickChord=0.1
  sections:
    n  Span  Root_Chord  Tip_Chord  Area   Sweep  Sweep_Location  Dihedral  Twist  Twist_Location  tip airfoil
    1  1.5   0.05        0.05       0.075  0      0               0         0      0.25            as above
